// SBML level 2 version 3

model net1()

  // Compartments:
  compartment Cytoplasm = 1;
  compartment Nucleus = 1;

  // Species:
  species STAT5 in Cytoplasm;
  species STAT5p in Cytoplasm = 0;
  species STAT5p2c in Cytoplasm = 0;
  species STAT5p2n in Nucleus = 0;
  species data1 in Cytoplasm;
  species data2 in Cytoplasm;
  species frac_v1 in Cytoplasm;
  species frac_v2 in Cytoplasm;
  species frac_v3 in Nucleus;
  species frac_v4 in Cytoplasm;

  // Parameters:
  r1 = 0.03851393;
  r3 = 1.806542;
  r4 = 0;
  tao = 3.999999;
  r4_0 = 0.3461992;
  v1_0 = 0.1831523;
  smooth_D_slope = 1;
  smooth_D_offset = 1;

  // Assignment rules:
  data1 := STAT5p + 2*STAT5p2c;
  data2 := STAT5 + STAT5p + 2*STAT5p2c;
  smooth_D := smooth_D_slope*time + smooth_D_offset;
  D := smooth_D;
  frac_v1 := STAT5/v1_0;
  frac_v2 := STAT5p/v1_0;
  frac_v3 := 2*STAT5p2c/v1_0;
  frac_v4 := 2*STAT5p2n/v1_0;

  // Reactions:
  R1: STAT5 -> STAT5p; Cytoplasm*r1*STAT5*D*60;
  R2: 2 STAT5p -> STAT5p2c; Cytoplasm*STAT5p*STAT5p;
  R3: STAT5p2c -> STAT5p2n; Cytoplasm*r3*STAT5p2c;
  R4: STAT5p2n -> 2 STAT5; Nucleus*r4*STAT5p2n;

  // Events:
  at (time > 0): smooth_D_slope = 0.06385, smooth_D_offset = 0;
  at (time > 2): smooth_D_slope = 0.0496, smooth_D_offset = 0.0458;
  at (time > 4): smooth_D_slope = 0.26085, smooth_D_offset = -0.7992;
  at (time > 6): smooth_D_slope = 0.11705, smooth_D_offset = 0.0636;
  at (time > 8): smooth_D_slope = -0.06975, smooth_D_offset = 1.558;
  at (time > 10): smooth_D_slope = -0.0388, smooth_D_offset = 1.2485;
  at (time > 12): smooth_D_slope = -0.1062, smooth_D_offset = 2.0573;
  at (time > 14): smooth_D_slope = 0.0256, smooth_D_offset = 0.2121;
  at (time > 16): smooth_D_slope = -0.14535, smooth_D_offset = 2.9473;
  at (time > 18): smooth_D_slope = 0.0039, smooth_D_offset = 0.2608;
  at (time > 20): smooth_D_slope = -0.00544, smooth_D_offset = 0.4476;
  at (time > 25): smooth_D_slope = -0.052196, smooth_D_offset = 1.6165;
  at (time > 30): smooth_D_slope = -0.002558, smooth_D_offset = 0.12736;
  at (time > 40): smooth_D_slope = -0.001341, smooth_D_offset = 0.07868;
  at (time > 50): smooth_D_slope = -0.001163, smooth_D_offset = 0.06978;
  at (time > tao): r4 = r4_0;
end
